<rocket_engine name="aerotech_k1800st_p_engine">
    <isp>224.0</isp>
    <builduptime>0.0</builduptime>
    <thrust_table name="propulsion/thrust_prop_remain" type="internal">
      <tableData>
        <!-- propellant burned (lb) | thrust (lbf) -->
         0.000   10.82
         0.200  460.0
         0.400  485.0
         0.700  470.0
         1.000  460.0
         1.300  440.0
         1.600  415.0
         1.900  350.0
         2.100  280.0
         2.300  180.0
         2.450   60.0
      </tableData>
    </thrust_table>
</rocket_engine>
